# OpenSim document version 40000
InverseKinematicsTool:
  time_range: 0 12.685
  constraint_weight: 20
  accuracy: 1e-6
  marker_file: short_dance_transformed_OptiTrack.trc
  report_errors: true
  report_marker_locations: true
  IKTaskSet:
    IKMarkerTask Digital_Twin_SUB001_LAH: apply=true weight=15
    IKMarkerTask Digital_Twin_SUB001_RAH: apply=true weight=15
    IKMarkerTask Digital_Twin_SUB001_RPH: apply=true weight=15
    IKMarkerTask Digital_Twin_SUB001_LPH: apply=true weight=15
    IKMarkerTask Digital_Twin_SUB001_CV7: apply=true weight=1
    IKMarkerTask Digital_Twin_SUB001_LCAJ: apply=true weight=250
    IKMarkerTask Digital_Twin_SUB001_RCAJ: apply=true weight=250
    IKMarkerTask Digital_Twin_SUB001_SJN: apply=true weight=15
    IKMarkerTask Digital_Twin_SUB001_SXS: apply=true weight=1
    IKMarkerTask Digital_Twin_SUB001_TV7: apply=true weight=1
    IKMarkerTask Digital_Twin_SUB001_RUA: apply=true weight=1
    IKMarkerTask Digital_Twin_SUB001_LUA: apply=true weight=1
    IKMarkerTask Digital_Twin_SUB001_RHLE: apply=true weight=250
    IKMarkerTask Digital_Twin_SUB001_LHLE: apply=true weight=250
    IKMarkerTask Digital_Twin_SUB001_RUSP: apply=true weight=150
    IKMarkerTask Digital_Twin_SUB001_RRSP: apply=true weight=150
    IKMarkerTask Digital_Twin_SUB001_RHM2: apply=true weight=1
    IKMarkerTask Digital_Twin_SUB001_LUSP: apply=true weight=150
    IKMarkerTask Digital_Twin_SUB001_LRSP: apply=true weight=150
    IKMarkerTask Digital_Twin_SUB001_LHM2: apply=true weight=1
    IKMarkerTask Digital_Twin_SUB001_RIAS: apply=true weight=800
    IKMarkerTask Digital_Twin_SUB001_LIAS: apply=true weight=800
    IKMarkerTask Digital_Twin_SUB001_RIPS: apply=true weight=800
    IKMarkerTask Digital_Twin_SUB001_LIPS: apply=true weight=800
    IKMarkerTask Digital_Twin_SUB001_RFAL: apply=true weight=200
    IKMarkerTask Digital_Twin_SUB001_LFAL: apply=true weight=200
    IKMarkerTask Digital_Twin_SUB001_LFCC: apply=true weight=250
    IKMarkerTask Digital_Twin_SUB001_LFM1: apply=true weight=350
    IKMarkerTask Digital_Twin_SUB001_LDP1: apply=true weight=100
    IKMarkerTask Digital_Twin_SUB001_RFCC: apply=true weight=250
    IKMarkerTask Digital_Twin_SUB001_RFM1: apply=true weight=350
    IKMarkerTask Digital_Twin_SUB001_LDP1: apply=true weight=100
    IKMarkerTask Digital_Twin_SUB001_RFM5: apply=true weight=100
    IKMarkerTask Digital_Twin_SUB001_LFM5: apply=true weight=100
    IKMarkerTask Digital_Twin_SUB001_RFLE: apply=true weight=600
    IKMarkerTask Digital_Twin_SUB001_LFLE: apply=true weight=600
    IKMarkerTask Digital_Twin_SUB001_RTH: apply=true weight=1
    IKMarkerTask Digital_Twin_SUB001_LTH: apply=true weight=1
    IKMarkerTask Digital_Twin_SUB001_RSK: apply=true weight=1
    IKMarkerTask Digital_Twin_SUB001_LSK: apply=true weight=1
    IKMarkerTask Digital_Twin_SUB001_RTTC: apply=true weight=50
    IKMarkerTask Digital_Twin_SUB001_LTTC: apply=true weight=50
    IKMarkerTask Digital_Twin_SUB001_RFTC: apply=true weight=350
    IKMarkerTask Digital_Twin_SUB001_LFTC: apply=true weight=350
    IKMarkerTask Digital_Twin_SUB001_RFAX: apply=true weight=1
    IKMarkerTask Digital_Twin_SUB001_LFAX: apply=true weight=1
