# OpenSim document version 40000
InverseKinematicsTool:
  time_range: 0 9.275
  constraint_weight: 20
  accuracy: 1e-9
  marker_file: test_sophia.trc
  report_errors: true
  report_marker_locations: true
  IKTaskSet:
    IKMarkerTask Dance:LFHD: apply=true weight=15
    IKMarkerTask Dance:RFHD: apply=true weight=15
    IKMarkerTask Dance:RBHD: apply=true weight=15
    IKMarkerTask Dance:LBHD: apply=true weight=15
    IKMarkerTask Dance:C7: apply=true weight=1
    IKMarkerTask Dance:LSHO: apply=true weight=250
    IKMarkerTask Dance:RSHO: apply=true weight=250
    IKMarkerTask Dance:CLAV: apply=true weight=15
    IKMarkerTask Dance:STRN: apply=true weight=1
    IKMarkerTask Dance:RBAC: apply=true weight=5
    IKMarkerTask Dance:T10: apply=true weight=1
    IKMarkerTask Dance:RUPA: apply=true weight=1
    IKMarkerTask Dance:LUPA: apply=true weight=1
    IKMarkerTask Dance:RELB: apply=true weight=250
    IKMarkerTask Dance:LELB: apply=true weight=250
    IKMarkerTask Dance:LFRM: apply=true weight=1
    IKMarkerTask Dance:RFRM: apply=true weight=1
    IKMarkerTask Dance:RWRB: apply=true weight=150
    IKMarkerTask Dance:RWRA: apply=true weight=150
    IKMarkerTask Dance:RFIN: apply=true weight=1
    IKMarkerTask Dance:LWRB: apply=true weight=150
    IKMarkerTask Dance:LWRA: apply=true weight=150
    IKMarkerTask Dance:LFIN: apply=true weight=1
    IKMarkerTask Dance:RFWT: apply=true weight=800
    IKMarkerTask Dance:LFWT: apply=true weight=800
    IKMarkerTask Dance:RBWT: apply=true weight=800
    IKMarkerTask Dance:LBWT: apply=true weight=800
    IKMarkerTask Dance:RANK: apply=true weight=200
    IKMarkerTask Dance:LANK: apply=true weight=200
    IKMarkerTask Dance:LHEE: apply=true weight=250
    IKMarkerTask Dance:LTOE: apply=true weight=350
    IKMarkerTask Dance:RHEE: apply=true weight=250
    IKMarkerTask Dance:RTOE: apply=true weight=350
    IKMarkerTask Dance:RMT5: apply=true weight=100
    IKMarkerTask Dance:LMT5: apply=true weight=100
    IKMarkerTask Dance:RKNE: apply=true weight=600
    IKMarkerTask Dance:LKNE: apply=true weight=600
    IKMarkerTask Dance:RTHI: apply=true weight=1
    IKMarkerTask Dance:LTHI: apply=true weight=1
    IKMarkerTask Dance:RSHN: apply=true weight=1
    IKMarkerTask Dance:LSHN: apply=true weight=1
