# OpenSim document version 40000
ScaleTool scaled_model_Optitrack:
  mass: 60.339 [kg]
  height: -1
  age: -1
  notes: female
  GenericModelMaker:
    model_file: model_Optitrack.osim
  ModelScaler:
    apply: true
    scaling_order: measurements
    marker_file: Tpose_transformed_OptiTracktrc.trc
    time_range: 0 0.5
    preserve_mass_distribution: true
    MeasurementSet dancer:
      Measurement head: apply=true
        MarkerPair: markers=(Digital_Twin_SUB001_LAH Digital_Twin_SUB001_RPH)
        MarkerPair: markers=(Digital_Twin_SUB001_RAH Digital_Twin_SUB001_LPH)
        BodyScale skull: axes=(X Y Z)
      Measurement torso: apply=true
        MarkerPair: markers=(Digital_Twin_SUB001_RCAJ Digital_Twin_SUB001_RIAS)
        MarkerPair: markers=(Digital_Twin_SUB001_LCAJ Digital_Twin_SUB001_LIAS)
        BodyScale torso: axes=(X Y Z)
        BodyScale Abdomen: axes=(X Y Z)
        BodyScale LB_wrap: axes=(X Y Z)
        BodyScale lumbar1: axes=(X Y Z)
        BodyScale lumbar2: axes=(X Y Z)
        BodyScale lumbar3: axes=(X Y Z)
        BodyScale lumbar4: axes=(X Y Z)
        BodyScale lumbar5: axes=(X Y Z)
        BodyScale neck: axes=(X Y Z)
      Measurement humerus: apply=true
        MarkerPair: markers=(Digital_Twin_SUB001_RHLE Digital_Twin_SUB001_RCAJ)
        MarkerPair: markers=(Digital_Twin_SUB001_LHLE Digital_Twin_SUB001_LCAJ)
        BodyScale humerus_l: axes=(X Y Z)
        BodyScale humerus_r: axes=(X Y Z)
      Measurement forearm: apply=true
        MarkerPair: markers=(Digital_Twin_SUB001_RHLE Digital_Twin_SUB001_RUSP)
        MarkerPair: markers=(Digital_Twin_SUB001_LHLE Digital_Twin_SUB001_LUSP)
        MarkerPair: markers=(Digital_Twin_SUB001_RHLE Digital_Twin_SUB001_RRSP)
        MarkerPair: markers=(Digital_Twin_SUB001_LHLE Digital_Twin_SUB001_LRSP)
        BodyScale ulna_l: axes=(X Y Z)
        BodyScale ulna_r: axes=(X Y Z)
        BodyScale radius_l: axes=(X Y Z)
        BodyScale radius_r: axes=(X Y Z)
      Measurement hand: apply=true
        MarkerPair: markers=(Digital_Twin_SUB001_RRSP Digital_Twin_SUB001_RHM2)
        MarkerPair: markers=(Digital_Twin_SUB001_RUSP Digital_Twin_SUB001_RHM2)
        MarkerPair: markers=(Digital_Twin_SUB001_LUSP Digital_Twin_SUB001_LHM2)
        MarkerPair: markers=(Digital_Twin_SUB001_LRSP Digital_Twin_SUB001_LHM2)
        BodyScale hand_l: axes=(X Y Z)
        BodyScale hand_r: axes=(X Y Z)
      Measurement sacrum: apply=true
        MarkerPair: markers=(Digital_Twin_SUB001_LIPS Digital_Twin_SUB001_RIPS)
        BodyScale sacrum: axes=(X Y Z)
      Measurement pelvis: apply=true
        MarkerPair: markers=(Digital_Twin_SUB001_RIAS Digital_Twin_SUB001_LIAS)
        BodyScale pelvis: axes=(X Y Z)
        BodyScale sacrum: axes=(X Y Z)
      Measurement femur: apply=true
        MarkerPair: markers=(Digital_Twin_SUB001_RIAS Digital_Twin_SUB001_RFLE)
        MarkerPair: markers=(Digital_Twin_SUB001_LIAS Digital_Twin_SUB001_LFLE)
        BodyScale femur_l: axes=(X Y Z)
        BodyScale femur_r: axes=(X Y Z)
        BodyScale patella_l: axes=(X Y Z)
        BodyScale patella_r: axes=(X Y Z)
      Measurement tibia: apply=true
        MarkerPair: markers=(Digital_Twin_SUB001_RFLE Digital_Twin_SUB001_RFAL)
        MarkerPair: markers=(Digital_Twin_SUB001_LFLE Digital_Twin_SUB001_LFAL)
        BodyScale tibia_l: axes=(X Y Z)
        BodyScale tibia_r: axes=(X Y Z)
        BodyScale talus_l: axes=(X Y Z)
        BodyScale talus_r: axes=(X Y Z)
      Measurement foot: apply=true
        MarkerPair: markers=(Digital_Twin_SUB001_RFCC Digital_Twin_SUB001_RFM5)
        MarkerPair: markers=(Digital_Twin_SUB001_LFCC Digital_Twin_SUB001_LFM5)
        BodyScale toes_l: axes=(X Y Z)
        BodyScale toes_r: axes=(X Y Z)
        BodyScale calcn_l: axes=(X Y Z)
        BodyScale calcn_r: axes=(X Y Z)
  MarkerPlacer:
    apply: true
    marker_file: Tpose_transformed_OptiTracktrc.trc
    time_range: 0 0.01
    output_motion_file: scaled_model_static_outputfile.mot
    output_model_file: scaled_model_Optitrack.osim
    max_marker_movement: -1
    IKTaskSet:
      IKMarkerTask Digital_Twin_SUB001_LAH: apply=true weight=1
      IKMarkerTask Digital_Twin_SUB001_RAH: apply=true weight=1
      IKMarkerTask Digital_Twin_SUB001_RPH: apply=true weight=1
      IKMarkerTask Digital_Twin_SUB001_LPH: apply=true weight=1
      IKMarkerTask Digital_Twin_SUB001_CV7: apply=true weight=300
      IKMarkerTask Digital_Twin_SUB001_LCAJ: apply=true weight=200
      IKMarkerTask Digital_Twin_SUB001_RCAJ: apply=true weight=200
      IKMarkerTask Digital_Twin_SUB001_SJN: apply=true weight=200
      IKMarkerTask Digital_Twin_SUB001_SXS: apply=true weight=1
      IKMarkerTask Digital_Twin_SUB001_TV7: apply=true weight=50
      IKMarkerTask Digital_Twin_SUB001_RUA: apply=true weight=1
      IKMarkerTask Digital_Twin_SUB001_LUA: apply=true weight=1
      IKMarkerTask Digital_Twin_SUB001_RHLE: apply=true weight=100
      IKMarkerTask Digital_Twin_SUB001_LHLE: apply=true weight=100
      IKMarkerTask Digital_Twin_SUB001_RUSP: apply=true weight=200
      IKMarkerTask Digital_Twin_SUB001_RRSP: apply=true weight=200
      IKMarkerTask Digital_Twin_SUB001_RHM2: apply=true weight=5
      IKMarkerTask Digital_Twin_SUB001_LUSP: apply=true weight=200
      IKMarkerTask Digital_Twin_SUB001_LRSP: apply=true weight=200
      IKMarkerTask Digital_Twin_SUB001_LHM2: apply=true weight=5
      IKMarkerTask Digital_Twin_SUB001_RIAS: apply=true weight=100
      IKMarkerTask Digital_Twin_SUB001_LIAS: apply=true weight=100
      IKMarkerTask Digital_Twin_SUB001_RIPS: apply=true weight=100
      IKMarkerTask Digital_Twin_SUB001_LIPS: apply=true weight=100
      IKMarkerTask Digital_Twin_SUB001_RFAL: apply=true weight=50
      IKMarkerTask Digital_Twin_SUB001_LFAL: apply=true weight=50
      IKMarkerTask Digital_Twin_SUB001_LFCC: apply=true weight=10
      IKMarkerTask Digital_Twin_SUB001_LDP1: apply=true weight=10
      IKMarkerTask Digital_Twin_SUB001_LFM1: apply=true weight=10
      IKMarkerTask Digital_Twin_SUB001_RFCC: apply=true weight=10
      IKMarkerTask Digital_Twin_SUB001_RDP1: apply=true weight=10
      IKMarkerTask Digital_Twin_SUB001_RFM1: apply=true weight=10
      IKMarkerTask Digital_Twin_SUB001_RFM5: apply=true weight=1
      IKMarkerTask Digital_Twin_SUB001_LFM5: apply=true weight=1
      IKMarkerTask Digital_Twin_SUB001_RFLE: apply=true weight=50
      IKMarkerTask Digital_Twin_SUB001_LFLE: apply=true weight=50
      IKMarkerTask Digital_Twin_SUB001_RTH: apply=true weight=1
      IKMarkerTask Digital_Twin_SUB001_LTH: apply=true weight=1
      IKMarkerTask Digital_Twin_SUB001_RSK: apply=true weight=1
      IKMarkerTask Digital_Twin_SUB001_LSK: apply=true weight=1
      IKMarkerTask Digital_Twin_SUB001_RTTC: apply=true weight=1
      IKMarkerTask Digital_Twin_SUB001_LTTC: apply=true weight=1
      IKMarkerTask Digital_Twin_SUB001_RFTC: apply=true weight=100
      IKMarkerTask Digital_Twin_SUB001_LFTC: apply=true weight=100
      IKMarkerTask Digital_Twin_SUB001_RFAX: apply=true weight=50
      IKMarkerTask Digital_Twin_SUB001_LFAX: apply=true weight=50
