# OpenSim document version 40000
ScaleTool Testperson:
  mass: 75.339 [kg]
  height: -1
  age: -1
  notes: female
  GenericModelMaker:
    model_file: Fullbody-hands-feet-tracemarkers-2.osim
  ModelScaler:
    apply: true
    scaling_order: measurements
    marker_file: test_sophia.trc
    time_range: 0 0.5
    preserve_mass_distribution: true
    MeasurementSet dancer:
      Measurement head: apply=true
        MarkerPair: markers=(Dance:LFHD Dance:RBHD)
        MarkerPair: markers=(Dance:RFHD Dance:LBHD)
        BodyScale skull: axes=(X Y Z)
      Measurement torso: apply=true
        MarkerPair: markers=(Dance:RSHO Dance:RFWT)
        MarkerPair: markers=(Dance:LSHO Dance:LFWT)
        MarkerPair: markers=(Dance:RSHO Dance:RBWT)
        MarkerPair: markers=(Dance:LSHO Dance:LBWT)
        BodyScale torso: axes=(X Y Z)
        BodyScale Abdomen: axes=(X Y Z)
        BodyScale LB_wrap: axes=(X Y Z)
        BodyScale lumbar1: axes=(X Y Z)
        BodyScale lumbar2: axes=(X Y Z)
        BodyScale lumbar3: axes=(X Y Z)
        BodyScale lumbar4: axes=(X Y Z)
        BodyScale lumbar5: axes=(X Y Z)
        BodyScale neck: axes=(X Y Z)
      Measurement humerus: apply=true
        MarkerPair: markers=(Dance:RELB Dance:RSHO)
        MarkerPair: markers=(Dance:LELB Dance:LSHO)
        BodyScale humerus_l: axes=(X Y Z)
        BodyScale humerus_r: axes=(X Y Z)
      Measurement forearm: apply=true
        MarkerPair: markers=(Dance:RELB Dance:RWRB)
        MarkerPair: markers=(Dance:LELB Dance:LWRB)
        MarkerPair: markers=(Dance:RELB Dance:RWRA)
        MarkerPair: markers=(Dance:LELB Dance:LWRA)
        BodyScale ulna_l: axes=(X Y Z)
        BodyScale ulna_r: axes=(X Y Z)
        BodyScale radius_l: axes=(X Y Z)
        BodyScale radius_r: axes=(X Y Z)
      Measurement hand: apply=true
        MarkerPair: markers=(Dance:RWRA Dance:RFIN)
        MarkerPair: markers=(Dance:LWRA Dance:LFIN)
        MarkerPair: markers=(Dance:RWRB Dance:RFIN)
        MarkerPair: markers=(Dance:LWRB Dance:LFIN)
        BodyScale hand_l: axes=(X Y Z)
        BodyScale hand_r: axes=(X Y Z)
      Measurement sacrum: apply=true
        MarkerPair: markers=(Dance:LBWT Dance:RBWT)
        BodyScale sacrum: axes=(X Y Z)
      Measurement pelvis: apply=true
        MarkerPair: markers=(Dance:RFWT Dance:LFWT)
        BodyScale pelvis: axes=(X Y Z)
        BodyScale sacrum: axes=(X Y Z)
      Measurement femur: apply=true
        MarkerPair: markers=(Dance:RFWT Dance:RKNE)
        MarkerPair: markers=(Dance:LFWT Dance:LKNE)
        BodyScale femur_l: axes=(X Y Z)
        BodyScale femur_r: axes=(X Y Z)
        BodyScale patella_l: axes=(X Y Z)
        BodyScale patella_r: axes=(X Y Z)
      Measurement tibia: apply=true
        MarkerPair: markers=(Dance:RKNE Dance:RANK)
        MarkerPair: markers=(Dance:LKNE Dance:LANK)
        BodyScale tibia_l: axes=(X Y Z)
        BodyScale tibia_r: axes=(X Y Z)
        BodyScale talus_l: axes=(X Y Z)
        BodyScale talus_r: axes=(X Y Z)
      Measurement foot: apply=true
        MarkerPair: markers=(Dance:RHEE Dance:RTOE)
        MarkerPair: markers=(Dance:LHEE Dance:LTOE)
        BodyScale toes_l: axes=(X Y Z)
        BodyScale toes_r: axes=(X Y Z)
        BodyScale calcn_l: axes=(X Y Z)
        BodyScale calcn_r: axes=(X Y Z)
  MarkerPlacer:
    apply: true
    marker_file: test_sophia.trc
    time_range: 0 0.01
    output_motion_file: scaled_model_static_outputfile.mot
    output_model_file: model_scaled.osim
    max_marker_movement: -1
    IKTaskSet:
      IKMarkerTask Dance:LFHD: apply=true weight=1
      IKMarkerTask Dance:RFHD: apply=true weight=1
      IKMarkerTask Dance:RBHD: apply=true weight=1
      IKMarkerTask Dance:LBHD: apply=true weight=1
      IKMarkerTask Dance:C7: apply=true weight=300
      IKMarkerTask Dance:LSHO: apply=true weight=200
      IKMarkerTask Dance:RSHO: apply=true weight=200
      IKMarkerTask Dance:CLAV: apply=true weight=200
      IKMarkerTask Dance:STRN: apply=true weight=1
      IKMarkerTask Dance:RBAC: apply=true weight=1
      IKMarkerTask Dance:T10: apply=true weight=50
      IKMarkerTask Dance:RUPA: apply=true weight=1
      IKMarkerTask Dance:LUPA: apply=true weight=1
      IKMarkerTask Dance:RELB: apply=true weight=100
      IKMarkerTask Dance:LELB: apply=true weight=100
      IKMarkerTask Dance:LFRM: apply=true weight=1
      IKMarkerTask Dance:RFRM: apply=true weight=1
      IKMarkerTask Dance:RWRB: apply=true weight=200
      IKMarkerTask Dance:RWRA: apply=true weight=200
      IKMarkerTask Dance:RFIN: apply=true weight=5
      IKMarkerTask Dance:LWRB: apply=true weight=200
      IKMarkerTask Dance:LWRA: apply=true weight=200
      IKMarkerTask Dance:LFIN: apply=true weight=5
      IKMarkerTask Dance:RFWT: apply=true weight=100
      IKMarkerTask Dance:LFWT: apply=true weight=100
      IKMarkerTask Dance:RBWT: apply=true weight=100
      IKMarkerTask Dance:LBWT: apply=true weight=100
      IKMarkerTask Dance:RANK: apply=true weight=50
      IKMarkerTask Dance:LANK: apply=true weight=50
      IKMarkerTask Dance:LHEE: apply=true weight=10
      IKMarkerTask Dance:LTOE: apply=true weight=10
      IKMarkerTask Dance:RHEE: apply=true weight=10
      IKMarkerTask Dance:RTOE: apply=true weight=10
      IKMarkerTask Dance:RMT5: apply=true weight=1
      IKMarkerTask Dance:LMT5: apply=true weight=1
      IKMarkerTask Dance:RKNE: apply=true weight=50
      IKMarkerTask Dance:LKNE: apply=true weight=50
      IKMarkerTask Dance:RTHI: apply=true weight=1
      IKMarkerTask Dance:LTHI: apply=true weight=1
      IKMarkerTask Dance:RSHN: apply=true weight=1
      IKMarkerTask Dance:LSHN: apply=true weight=1
